// COMSOL Multiphysics 5.2.0.166 model "spintronic_transient.mph"
// Outline of the model tree

Functions
  an1: Analytic "Drift (Velocity) Term (X-Component)" | funcname = vel_eqnX; expr = uni_torque_x; args = {x, y, z}; argunit = m, m, m; fununit = m/s
  an2: Analytic "Drift (Velocity) Term (Y-Component)" | funcname = vel_eqnY; expr = uni_torque_y; args = {x, y, z}; argunit = 1, 1, 1; fununit = m/s
  an3: Analytic "Drift (Velocity) Term (Z-Component)" | funcname = vel_eqnZ; expr = uni_torque_z; args = {x, y, z}; argunit = 1, 1, 1; fununit = m/s
  an4: Analytic "LLG Precession Torque (X-Component)" | funcname = llg_precess_x; expr = Hy*z-Hz*y; args = {x, y, z, Hx, Hy, Hz}; argunit = m, m, m, 1, 1, 1
  an5: Analytic "LLG Precession Torque (Y-Component)" | funcname = llg_precess_y; expr = Hz*x-Hx*z; args = {x, y, z, Hx, Hy, Hz}; argunit = m, m, m, 1, 1, 1
  an6: Analytic "LLG Precession Torque (Z-Component)" | funcname = llg_precess_z; expr = Hx*y-Hy*x; args = {x, y, z, Hx, Hy, Hz}; argunit = m, m, m, 1, 1, 1
  an7: Analytic "LLG Damping Torque (X-Component)" | funcname = llg_damp_x; expr = Hx - x*(Hx*x+Hy*y+Hz*z); args = {x, y, z, Hx, Hy, Hz}; argunit = m, m, m, 1, 1, 1
  an8: Analytic "LLG Damping Torque (Y-Component)" | funcname = llg_damp_y; expr = Hy - y*(Hx*x+Hy*y+Hz*z); args = {x, y, z, Hx, Hy, Hz}; argunit = m, m, m, 1, 1, 1
  an9: Analytic "LLG Damping Torque (Z-Component)" | funcname = llg_damp_z; expr = Hz - z*(Hx*x+Hy*y+Hz*z); args = {x, y, z, Hx, Hy, Hz}; argunit = m, m, m, 1, 1, 1
  an10: Analytic "Vector Dot Product" | funcname = uax_vec_dot; expr = (x*ux+y*uy+z*uz)/((ux*ux+uy*uy+uz*uz)*sqrt(x*x+y*y+z*z)); args = {x, y, z, ux, uy, uz}; argunit = m, m, m, 1, 1, 1; fununit = 1

Variables
  var1 "Global Variables"
    mu0 = mu0_const
    hbar = hbar_const
  var2 "Uniaxial Anisotropy Variables"
    uax_x = 0
    uax_y = 0
    uax_z = 1
    Ku2 = 44[1/J]*kBT
    Huni = 2*Ku2/Msat
    Huax_x = Huni*uax_x*uax_vec_dot(x, y, z, uax_x, uax_y, uax_z)
    Huax_y = Huni*uax_y*uax_vec_dot(x,y,z,uax_x,uax_y,uax_z)
    Huax_z = Huni*uax_z*uax_vec_dot(x,y,z,uax_x,uax_y,uax_z)
    uni_torque_x = gamFac*(1+dampFac*dampFac)*(llg_precess_x(x,y,z,Huax_x,Huax_y,Huax_z)+dampFac*llg_damp_x(x,y,z,Huax_x,Huax_y,Huax_z))
  var3 "Local Variables"
    Temperature = 300[K]
    kBT = k_B_const*Temperature
    Msat = 800e3
    gamFac = 2.215e5[m/H]*mu0_const
    dampFac = 0.03
    L_width = 50e-9[m]
    L_length = 50e-9[m]
    L_thick = 2e-9[m]
    mag_Vol = L_width*L_length*L_thick
    diffCoeff = 1.0[m^5/J/s]*gamFac*kBT/(Msat*mag_Vol)
  var4 "Demagnetization Variables"
    Nxx = 0
    Nyy = 0
    Nzz = 0
    Hdemag_x = Nxx*uax_vec_dot(x, y, z, 1, 0, 0)
    Hdemag_y = Nyy*uax_vec_dot(x, y, z, 1, 1, 0)
    Hdemag_z = Nzz*uax_vec_dot(x, y, z, 0, 0, 1)

Geometry
  geom1 "MainGeometry" (3D, length unit m)
    sph1: Sphere "StateSpace" | type = surface; r = 1
    fin: Finalize "Form Union"

Physics
  w: WeakFormPDE on all domains
    dependent variable rho
    wfeq1: WeakFormPDE (default)
      weak = rhot*test(rho)-rho*(vel_eqnX*test(rhox)+vel_eqnY*test(rhoy)+vel_eqnZ*(rhoz)))+diffCoeff*(rhox*test(rhox)+rhoy*test(rhoy)+rhoz*test(rhoz))
    zflx1: ZeroFluxBoundary "Zero Flux 1" (default)
    init1: init "Initial Values 1" (default) | rho = 1.0/(4.0*pi)

Mesh
  mesh1 "SphereMesh"
    size: MeshSizeDefault | hmax = 0.1; hauto = 1; custom = on
    ftri1: FreeTri "Free Triangular 1" on entire geometry

Studies
  std1 "Study 1"
    time: Transient "Time Dependent" | tunit = ns; tlist = range(0,1000/1,1000); rtol = 1e-12

Solver configurations
  sol1 "Solution 1" (study std1)
    v1: Variables "Dependent Variables 1"
    t1: Time "Time-Dependent Solver 1" | tlist = range(0,1000/1,1000)
      dDef: Direct
      fc1: FullyCoupled | linsolver = dDef

Datasets
  dset1: Solution | solution = sol1

Plots
  pg1: PlotGroup3D "3D Plot Group 1" | data = dset1
    mesh1: Mesh
    surf1: Surface | expr = rho